// SBML level 3 version 1

model main()
  // model units - substance: nM, time: ms, extent: nM

  // Compartments:
  compartment c1 = 1 litre;
  compartment compartment = 5e-16 litre;

  // Species:
  species Ca in compartment = 0;
  species PMCA in compartment = 22000;
  species PMCACa in compartment = 0;

  // Parameters:
  kon_1 = 5e-5 l_per_nM_per_ms;
  koff_1 = 0.007 per_ms;

  // Reactions:
  r1: Ca + PMCA => PMCACa; compartment*(kon_1*Ca*PMCA - koff_1*PMCACa);

  // Unit definitions:
  unit nM = 1e-9 mole;
  unit ms = 1e-3 second;
  unit per_ms = 1 / (1e-3 second);
  unit l_per_nM_per_ms = litre / (1e-9 mole * 1e-3 second);
end
