// SBML level 3 version 1

model main()
  // model units - substance: nM, time: ms, extent: mole

  // Compartments:
  compartment compartment = 5e-16 litre;

  // Species:
  species Ca in compartment = 0;
  species CaOut in compartment = 1900000;
  species CaOutLeak in compartment = 0;
  species Leak in compartment = 2000;
  species Calbin in compartment = 150000;
  species CalbinC in compartment = 15000;
  species LOut in compartment = 2500000;
  species Epac1 in compartment = 500;
  species Epac1cAMP in compartment = 0;
  species PMCA in compartment = 22000;
  species NCX in compartment = 540000;
  species PMCACa in compartment = 0;
  species NCXCa in compartment = 0;
  species L in compartment = 10;
  species R in compartment = 1600;
  species Gs in compartment = 13000;
  species Gi in compartment = 2600;
  species LR in compartment = 0;
  species LRGs in compartment = 0;
  species PKAcLR in compartment = 0;
  species PKAcpLR in compartment = 0;
  species PKAcppLR in compartment = 0;
  species PKAcpppLR in compartment = 0;
  species pLR in compartment = 0;
  species ppLR in compartment = 0;
  species pppLR in compartment = 0;
  species ppppLR in compartment = 0;
  species ppppLRGi in compartment = 0;
  species ppppLRGibg in compartment = 0;
  species PKAcR in compartment = 0;
  species PKAcpR in compartment = 0;
  species PKAcppR in compartment = 0;
  species PKAcpppR in compartment = 0;
  species pR in compartment = 0;
  species ppR in compartment = 0;
  species pppR in compartment = 0;
  species ppppR in compartment = 0;
  species ppppRGi in compartment = 0;
  species ppppRGibg in compartment = 0;
  species GsR in compartment = 0;
  species GsaGTP in compartment = 0;
  species GsaGDP in compartment = 0;
  species GiaGTP in compartment = 0;
  species GiaGDP in compartment = 0;
  species Gibg in compartment = 0;
  species Gsbg in compartment = 0;
  species LRGsbg in compartment = 0;
  species AC1 in compartment = 430;
  species AC1GsaGTP in compartment = 0;
  species AC1GsaGTPCaMCa4 in compartment = 0;
  species AC1GsaGTPCaMCa4ATP in compartment = 0;
  species AC1GiaGTP in compartment = 0;
  species AC1GiaGTPCaMCa4 in compartment = 0;
  species AC1GiaGTPCaMCa4ATP in compartment = 0;
  species AC1GsaGTPGiaGTP in compartment = 0;
  species AC1GsaGTPGiaGTPCaMCa4 in compartment = 0;
  species AC1GsGiCaMCa4ATP in compartment = 0;
  species ATP in compartment = 2000000;
  species cAMP in compartment = 0;
  species AC1CaMCa4 in compartment = 0;
  species AC1CaMCa4ATP in compartment = 0;
  species AC8 in compartment = 370;
  species AC8CaMCa4 in compartment = 0;
  species AC8CaMCa4ATP in compartment = 0;
  species PDE1 in compartment = 12000;
  species PDE1CaMCa4 in compartment = 0;
  species PDE1CaMCa4cAMP in compartment = 0;
  species AMP in compartment = 980;
  species Ng in compartment = 20000;
  species NgCaM in compartment = 0;
  species CaM in compartment = 60000;
  species CaMCa2 in compartment = 0;
  species CaMCa3 in compartment = 0;
  species CaMCa4 in compartment = 0;
  species PP2B in compartment = 2300;
  species PP2BCaM in compartment = 0;
  species PP2BCaMCa2 in compartment = 0;
  species PP2BCaMCa3 in compartment = 0;
  species PP2BCaMCa4 in compartment = 0;
  species CK in compartment = 23000;
  species CKCaMCa4 in compartment = 0;
  species CKpCaMCa4 in compartment = 0;
  species CKp in compartment = 0;
  species Complex in compartment = 0;
  species pComplex in compartment = 0;
  species CKpPP1 in compartment = 0;
  species CKpCaMCa4PP1 in compartment = 0;
  species PKA in compartment = 6400;
  species PKAcAMP4 in compartment = 0;
  species PKAr in compartment = 0;
  species PKAc in compartment = 0;
  species I1 in compartment = 2200;
  species I1PKAc in compartment = 0;
  species Ip35 in compartment = 0;
  species PP1 in compartment = 1600;
  species Ip35PP1 in compartment = 0;
  species Ip35PP2BCaMCa4 in compartment = 0;
  species Ip35PP1PP2BCaMCa4 in compartment = 0;
  species PP1PP2BCaMCa4 in compartment = 0;
  species GluR1 in compartment = 180;
  species GluR1_S845 in compartment = 0;
  species GluR1_S831 in compartment = 0;
  species GluR1_S845_S831 in compartment = 0;
  species GluR1_PKAc in compartment = 0;
  species GluR1_CKCam in compartment = 0;
  species GluR1_CKpCam in compartment = 0;
  species GluR1_CKp in compartment = 0;
  species GluR1_PKCt in compartment = 0;
  species GluR1_PKCp in compartment = 0;
  species GluR1_S845_CKCam in compartment = 0;
  species GluR1_S845_CKpCam in compartment = 0;
  species GluR1_S845_CKp in compartment = 0;
  species GluR1_S845_PKCt in compartment = 0;
  species GluR1_S845_PKCp in compartment = 0;
  species GluR1_S831_PKAc in compartment = 0;
  species GluR1_S845_PP1 in compartment = 0;
  species GluR1_S845_S831_PP1 in compartment = 0;
  species GluR1_S831_PP1 in compartment = 0;
  species GluR1_S845_PP2B in compartment = 0;
  species GluR1_S845_S831_PP2B in compartment = 0;
  species GluR1_memb in compartment = 90;
  species GluR1_memb_S845 in compartment = 0;
  species GluR1_memb_S831 in compartment = 0;
  species GluR1_memb_S845_S831 in compartment = 0;
  species GluR1_memb_PKAc in compartment = 0;
  species GluR1_memb_CKCam in compartment = 0;
  species GluR1_memb_CKpCam in compartment = 0;
  species GluR1_memb_CKp in compartment = 0;
  species GluR1_memb_PKCt in compartment = 0;
  species GluR1_memb_PKCp in compartment = 0;
  species GluR1_memb_S845_CKCam in compartment = 0;
  species GluR1_memb_S845_CKpCam in compartment = 0;
  species GluR1_memb_S845_CKp in compartment = 0;
  species GluR1_memb_S845_PKCt in compartment = 0;
  species GluR1_memb_S845_PKCp in compartment = 0;
  species GluR1_memb_S831_PKAc in compartment = 0;
  species GluR1_memb_S845_PP1 in compartment = 0;
  species GluR1_memb_S845_S831_PP1 in compartment = 0;
  species GluR1_memb_S831_PP1 in compartment = 0;
  species GluR1_memb_S845_PP2B in compartment = 0;
  species GluR1_memb_S845_S831_PP2B in compartment = 0;
  species PDE4 in compartment = 670;
  species PDE4cAMP in compartment = 0;
  species PKAcPDE4 in compartment = 0;
  species pPDE4 in compartment = 0;
  species pPDE4cAMP in compartment = 0;
  species PKAc_PDE4_cAMP in compartment = 0;
  species fixedbuffer in compartment = 500000;
  species fixedbufferCa in compartment = 0;
  species Glu in compartment = 0;
  species MGluR in compartment = 800;
  species MGluR_Glu in compartment = 0;
  species MGluR_Glu_desens in compartment = 0;
  species MGluR_Gqabg_Glu in compartment = 0;
  species GluOut in compartment = 1000000;
  species Gqabg in compartment = 1400;
  species GqaGTP in compartment = 0;
  species GqaGDP in compartment = 0;
  species PLC in compartment = 250;
  species PLCCa in compartment = 0;
  species PLCCaGqaGTP in compartment = 0;
  species PLCGqaGTP in compartment = 0;
  species Pip2 in compartment = 24000;
  species PLCCaPip2 in compartment = 0;
  species PLCCaGqaGTPPip2 in compartment = 0;
  species Ip3 in compartment = 0;
  species PLCCaDAG in compartment = 0;
  species PLCCaGqaGTPDAG in compartment = 0;
  species PIkinase in compartment = 290;
  species Ip3degPIk in compartment = 400;
  species PKC in compartment = 15000;
  species PKCCa in compartment = 0;
  species PKCt in compartment = 0;
  species PKCp in compartment = 0;
  species DAG in compartment = 90;
  species DAGK in compartment = 300;
  species DAGKdag in compartment = 0;
  species PA in compartment = 0;
  species DGL in compartment = 1600;
  species CaDGL in compartment = 250;
  species DAGCaDGL in compartment = 90;
  species _2AG in compartment = 0;
  species _2AGdegrad in compartment = 0;
  species Ip3degrad in compartment = 600;
  species GluR2 in compartment = 14;
  species GluR2_PKCt in compartment = 0;
  species GluR2_PKCp in compartment = 0;
  species GluR2_S880 in compartment = 0;
  species GluR2_S880_PP2A in compartment = 0;
  species GluR2_memb in compartment = 256;
  species GluR2_memb_PKCt in compartment = 0;
  species GluR2_memb_PKCp in compartment = 0;
  species GluR2_memb_S880 in compartment = 0;
  species GluR2_memb_S880_PP2A in compartment = 0;
  species PP2A in compartment = 500;
  species ACh in compartment = 0;
  species M1R in compartment = 450;
  species AChM1R in compartment = 0;
  species M1RGq in compartment = 0;
  species AChM1RGq in compartment = 0;
  species PLA2 in compartment = 1000;
  species CaPLA2 in compartment = 0;
  species CaPLA2Pip2 in compartment = 0;
  species AA in compartment = 0;

  // Parameters:
  kon_1 = 5e-5 per_nM_per_ms;
  koff_1 = 0.007 per_ms;
  kon_2 = 0.0035 per_ms;
  koff_2 = 0 per_nM_per_ms;
  kon_3 = 1.68e-5 per_nM_per_ms;
  koff_3 = 0.0112 per_ms;
  kon_4 = 0.0056 per_ms;
  koff_4 = 0 per_nM_per_ms;
  kon_5 = 1.5e-6 per_nM_per_ms;
  koff_5 = 0.0011 per_ms;
  kon_6 = 0.0011 per_ms;
  koff_6 = 0 per_nM_per_ms;
  kon_7 = 2.8e-5 per_nM_per_ms;
  koff_7 = 0.0196 per_ms;
  kon_8 = 0.0005 per_ms;
  koff_8 = 2e-9 per_ms;
  kon_9 = 5.555e-6 per_nM_per_ms;
  koff_9 = 0.005 per_ms;
  kon_10 = 6e-7 per_nM_per_ms;
  koff_10 = 1e-6 per_ms;
  kon_11 = 4e-8 per_nM_per_ms;
  koff_11 = 3e-7 per_ms;
  kon_12 = 2.5e-6 per_nM_per_ms;
  koff_12 = 0.0005 per_ms;
  kon_13 = 0.02 per_ms;
  koff_13 = 0 per_nM_per_ms;
  kon_14 = 0.08 per_ms;
  koff_14 = 0 per_nM_per_ms;
  kon_15 = 8e-7 per_nM_per_ms;
  koff_15 = 0.00448 per_ms;
  kon_16 = 0.001 per_ms;
  koff_16 = 0 per_nM_per_ms;
  kon_17 = 8e-7 per_nM_per_ms;
  koff_17 = 0.00448 per_ms;
  kon_18 = 0.001 per_ms;
  koff_18 = 0 per_nM_per_ms;
  kon_19 = 1.712e-5 per_nM_per_ms;
  koff_19 = 0.00448 per_ms;
  kon_20 = 0.001 per_ms;
  koff_20 = 0 per_nM_per_ms;
  kon_21 = 0.001712 per_nM_per_ms;
  koff_21 = 0.00448 per_ms;
  kon_22 = 0.001 per_ms;
  koff_22 = 0 per_nM_per_ms;
  kon_23 = 0.00015 per_nM_per_ms;
  koff_23 = 0.00025 per_ms;
  kon_24 = 0.000125 per_ms;
  koff_24 = 0 per_nM_per_ms;
  kon_25 = 0.001 per_ms;
  koff_25 = 0 per_nM_per_ms;
  kon_26 = 2.5e-6 per_ms;
  koff_26 = 0 per_ms;
  kon_27 = 2.5e-6 per_ms;
  koff_27 = 0 per_ms;
  kon_28 = 2.5e-6 per_ms;
  koff_28 = 0 per_ms;
  kon_29 = 2.5e-6 per_ms;
  koff_29 = 0 per_ms;
  kon_30 = 4e-8 per_nM_per_ms;
  koff_30 = 0.00448 per_ms;
  kon_31 = 0.001 per_ms;
  koff_31 = 0 per_nM_per_ms;
  kon_32 = 4e-7 per_nM_per_ms;
  koff_32 = 0.00448 per_ms;
  kon_33 = 0.001 per_ms;
  koff_33 = 0 per_nM_per_ms;
  kon_34 = 4e-6 per_nM_per_ms;
  koff_34 = 0.00448 per_ms;
  kon_35 = 0.001 per_ms;
  koff_35 = 0 per_nM_per_ms;
  kon_36 = 0.0004 per_nM_per_ms;
  koff_36 = 0.00448 per_ms;
  kon_37 = 0.001 per_ms;
  koff_37 = 0 per_nM_per_ms;
  kon_38 = 7.5e-5 per_nM_per_ms;
  koff_38 = 0.000125 per_ms;
  kon_39 = 6.25e-5 per_ms;
  koff_39 = 0 per_nM_per_ms;
  kon_40 = 0.001 per_ms;
  koff_40 = 0 per_nM_per_ms;
  kon_41 = 2.5e-6 per_ms;
  koff_41 = 0 per_ms;
  kon_42 = 2.5e-6 per_ms;
  koff_42 = 0 per_ms;
  kon_43 = 2.5e-6 per_ms;
  koff_43 = 0 per_ms;
  kon_44 = 2.5e-6 per_ms;
  koff_44 = 0 per_ms;
  kon_45 = 0.01 per_ms;
  koff_45 = 0 per_ms;
  kon_46 = 0.1 per_nM_per_ms;
  koff_46 = 0 per_ms;
  kon_47 = 0.000125 per_ms;
  koff_47 = 0 per_ms;
  kon_48 = 0.00125 per_nM_per_ms;
  koff_48 = 0 per_ms;
  kon_49 = 3.85e-5 per_nM_per_ms;
  koff_49 = 0.01 per_ms;
  kon_50 = 6e-6 per_nM_per_ms;
  koff_50 = 0.0009 per_ms;
  kon_51 = 1e-5 per_nM_per_ms;
  koff_51 = 2.273 per_ms;
  kon_52 = 0.02842 per_ms;
  koff_52 = 0 per_nM_per_ms;
  kon_53 = 6.25e-5 per_nM_per_ms;
  koff_53 = 0.01 per_ms;
  kon_54 = 6e-6 per_nM_per_ms;
  koff_54 = 0.0009 per_ms;
  kon_55 = 1e-5 per_nM_per_ms;
  koff_55 = 2.273 per_ms;
  kon_56 = 0.002842 per_ms;
  koff_56 = 0 per_nM_per_ms;
  kon_57 = 6.25e-5 per_nM_per_ms;
  koff_57 = 0.01 per_ms;
  kon_58 = 1e-5 per_nM_per_ms;
  koff_58 = 2.273 per_ms;
  kon_59 = 0.0005684 per_ms;
  koff_59 = 0 per_nM_per_ms;
  kon_60 = 6e-6 per_nM_per_ms;
  koff_60 = 0.0009 per_ms;
  kon_61 = 1e-5 per_nM_per_ms;
  koff_61 = 2.273 per_ms;
  kon_62 = 0.005684 per_ms;
  koff_62 = 0 per_nM_per_ms;
  kon_63 = 6.25e-5 per_nM_per_ms;
  koff_63 = 0.01 per_ms;
  kon_64 = 1.25e-6 per_nM_per_ms;
  koff_64 = 0.001 per_ms;
  kon_65 = 1e-5 per_nM_per_ms;
  koff_65 = 2.273 per_ms;
  kon_66 = 0.002842 per_ms;
  koff_66 = 0 per_nM_per_ms;
  kon_67 = 1.7e-8 per_nM2_per_ms;
  koff_67 = 0.035 per_ms;
  kon_68 = 1.4e-5 per_nM_per_ms;
  koff_68 = 0.228 per_ms;
  kon_69 = 2.6e-5 per_nM_per_ms;
  koff_69 = 0.064 per_ms;
  kon_70 = 2.8e-5 per_nM_per_ms;
  koff_70 = 0.036 per_ms;
  kon_71 = 4.6e-6 per_nM_per_ms;
  koff_71 = 1.2e-6 per_ms;
  kon_72 = 4.6e-5 per_nM_per_ms;
  koff_72 = 1.2e-6 per_ms;
  kon_73 = 4.6e-5 per_nM_per_ms;
  koff_73 = 1.2e-6 per_ms;
  kon_74 = 1.7e-7 per_nM2_per_ms;
  koff_74 = 0.35 per_ms;
  kon_75 = 1.4e-5 per_nM_per_ms;
  koff_75 = 0.228 per_ms;
  kon_76 = 2.6e-5 per_nM_per_ms;
  koff_76 = 0.064 per_ms;
  kon_77 = 1e-5 per_nM_per_ms;
  koff_77 = 0.003 per_ms;
  kon_78 = 1e-7 per_nM_per_ms;
  koff_78 = 0.01 per_ms;
  kon_79 = 1e-7 per_nM_per_ms;
  koff_79 = 0.01 per_ms;
  kon_80 = 1e-7 per_nM_per_ms;
  koff_80 = 0 per_nM_per_ms;
  kon_81 = 1e-7 per_nM_per_ms;
  koff_81 = 0 per_nM_per_ms;
  kon_82 = 1e-5 per_nM_per_ms;
  koff_82 = 0 per_nM_per_ms;
  kon_83 = 3e-5 per_nM_per_ms;
  koff_83 = 0 per_nM_per_ms;
  kon_84 = 8e-7 per_ms;
  koff_84 = 1e-5 per_nM_per_ms;
  kon_85 = 4e-9 per_nM_per_ms;
  koff_85 = 0.00034 per_ms;
  kon_86 = 8.6e-5 per_ms;
  koff_86 = 0 per_nM_per_ms;
  kon_87 = 4e-9 per_nM_per_ms;
  koff_87 = 0.00034 per_ms;
  kon_88 = 8.6e-5 per_ms;
  koff_88 = 0 per_nM_per_ms;
  kon_89 = 1.6e-15 per_nM4_per_ms;
  koff_89 = 6e-5 per_ms;
  kon_90 = 3.1e-8 per_nM_per_ms;
  koff_90 = 6.51e-5 per_ms;
  kon_91 = 1.4e-6 per_nM_per_ms;
  koff_91 = 0.0056 per_ms;
  kon_92 = 0.0014 per_ms;
  koff_92 = 0 per_nM_per_ms;
  kon_93 = 1e-6 per_nM_per_ms;
  koff_93 = 1.1e-6 per_ms;
  kon_94 = 9.625e-5 per_nM_per_ms;
  koff_94 = 0.33 per_ms;
  kon_95 = 0.055 per_ms;
  koff_95 = 0 per_nM_per_ms;
  kon_96 = 9.625e-5 per_nM_per_ms;
  koff_96 = 0.33 per_ms;
  kon_97 = 0.055 per_ms;
  koff_97 = 0 per_nM_per_ms;
  kon_98 = 0.0015 per_ms;
  koff_98 = 0 per_nM_per_ms;
  kon_99 = 4.02e-6 per_nM_per_ms;
  koff_99 = 0.024 per_ms;
  kon_100 = 0.006 per_ms;
  kon_101 = 2.224e-8 per_nM_per_ms;
  koff_101 = 0.0016 per_ms;
  kon_102 = 0.0004 per_ms;
  kon_103 = 2.78e-8 per_nM_per_ms;
  koff_103 = 0.002 per_ms;
  kon_104 = 0.0005 per_ms;
  kon_105 = 2.224e-8 per_nM_per_ms;
  koff_105 = 0.0016 per_ms;
  kon_106 = 0.0004 per_ms;
  kon_107 = 2.78e-8 per_nM_per_ms;
  koff_107 = 0.002 per_ms;
  kon_108 = 0.0005 per_ms;
  kon_109 = 2.78e-8 per_nM_per_ms;
  koff_109 = 0.002 per_ms;
  kon_110 = 0.0005 per_ms;
  kon_111 = 2.224e-8 per_nM_per_ms;
  koff_111 = 0.0016 per_ms;
  kon_112 = 0.0004 per_ms;
  kon_113 = 2.78e-8 per_nM_per_ms;
  koff_113 = 0.002 per_ms;
  kon_114 = 0.0005 per_ms;
  kon_115 = 2.224e-8 per_nM_per_ms;
  koff_115 = 0.0016 per_ms;
  kon_116 = 0.0004 per_ms;
  kon_117 = 2.78e-8 per_nM_per_ms;
  koff_117 = 0.002 per_ms;
  kon_118 = 0.0005 per_ms;
  kon_119 = 2.78e-8 per_nM_per_ms;
  koff_119 = 0.002 per_ms;
  kon_120 = 0.0005 per_ms;
  kon_121 = 4e-6 per_nM_per_ms;
  koff_121 = 0.024 per_ms;
  kon_122 = 0.006 per_ms;
  kon_123 = 8.7e-7 per_nM_per_ms;
  koff_123 = 0.00068 per_ms;
  kon_124 = 0.00017 per_ms;
  kon_125 = 8.75e-7 per_nM_per_ms;
  koff_125 = 0.0014 per_ms;
  kon_126 = 0.00035 per_ms;
  kon_127 = 0.00035 per_ms;
  kon_128 = 8.75e-7 per_nM_per_ms;
  koff_128 = 0.0014 per_ms;
  kon_129 = 0.00035 per_ms;
  kon_130 = 2.01e-6 per_nM_per_ms;
  koff_130 = 0.008 per_ms;
  kon_131 = 0.002 per_ms;
  kon_132 = 2.01e-6 per_nM_per_ms;
  koff_132 = 0.008 per_ms;
  kon_133 = 0.002 per_ms;
  kon_134 = 4.02e-6 per_nM_per_ms;
  koff_134 = 0.024 per_ms;
  kon_135 = 0.006 per_ms;
  kon_136 = 2.224e-8 per_nM_per_ms;
  koff_136 = 0.0016 per_ms;
  kon_137 = 0.0004 per_ms;
  kon_138 = 2.78e-8 per_nM_per_ms;
  koff_138 = 0.002 per_ms;
  kon_139 = 0.0005 per_ms;
  kon_140 = 2.224e-8 per_nM_per_ms;
  koff_140 = 0.0016 per_ms;
  kon_141 = 0.0004 per_ms;
  kon_142 = 2.78e-8 per_nM_per_ms;
  koff_142 = 0.002 per_ms;
  kon_143 = 0.0005 per_ms;
  kon_144 = 2.78e-8 per_nM_per_ms;
  koff_144 = 0.002 per_ms;
  kon_145 = 0.0005 per_ms;
  kon_146 = 2.224e-8 per_nM_per_ms;
  koff_146 = 0.0016 per_ms;
  kon_147 = 0.0004 per_ms;
  kon_148 = 2.78e-8 per_nM_per_ms;
  koff_148 = 0.002 per_ms;
  kon_149 = 0.0005 per_ms;
  kon_150 = 2.224e-8 per_nM_per_ms;
  koff_150 = 0.0016 per_ms;
  kon_151 = 0.0004 per_ms;
  kon_152 = 2.78e-8 per_nM_per_ms;
  koff_152 = 0.002 per_ms;
  kon_153 = 0.0005 per_ms;
  kon_154 = 2.78e-8 per_nM_per_ms;
  koff_154 = 0.002 per_ms;
  kon_155 = 0.0005 per_ms;
  kon_156 = 4e-6 per_nM_per_ms;
  koff_156 = 0.024 per_ms;
  kon_157 = 0.006 per_ms;
  kon_158 = 8.7e-7 per_nM_per_ms;
  koff_158 = 0.00068 per_ms;
  kon_159 = 0.00017 per_ms;
  kon_160 = 8.75e-7 per_nM_per_ms;
  koff_160 = 0.0014 per_ms;
  kon_161 = 0.00035 per_ms;
  kon_162 = 0.00035 per_ms;
  kon_163 = 8.75e-7 per_nM_per_ms;
  koff_163 = 0.0014 per_ms;
  kon_164 = 0.00035 per_ms;
  kon_165 = 2.01e-6 per_nM_per_ms;
  koff_165 = 0.008 per_ms;
  kon_166 = 0.002 per_ms;
  kon_167 = 2.01e-6 per_nM_per_ms;
  koff_167 = 0.008 per_ms;
  kon_168 = 0.002 per_ms;
  kon_169 = 2e-7 per_ms;
  koff_169 = 8e-7 per_ms;
  kon_170 = 2e-7 per_ms;
  koff_170 = 8e-7 per_ms;
  kon_171 = 2e-7 per_ms;
  koff_171 = 8e-7 per_ms;
  kon_172 = 2e-7 per_ms;
  koff_172 = 8e-7 per_ms;
  kon_173 = 2e-7 per_ms;
  koff_173 = 8e-7 per_ms;
  kon_174 = 2e-7 per_ms;
  koff_174 = 8e-7 per_ms;
  kon_175 = 2e-7 per_ms;
  koff_175 = 8e-7 per_ms;
  kon_176 = 2e-7 per_ms;
  koff_176 = 8e-7 per_ms;
  kon_177 = 2e-7 per_ms;
  koff_177 = 8e-7 per_ms;
  kon_178 = 2e-7 per_ms;
  koff_178 = 8e-7 per_ms;
  kon_179 = 3.28e-5 per_ms;
  koff_179 = 8e-6 per_ms;
  kon_180 = 3.28e-5 per_ms;
  koff_180 = 8e-6 per_ms;
  kon_181 = 3.28e-5 per_ms;
  koff_181 = 8e-6 per_ms;
  kon_182 = 3.28e-5 per_ms;
  koff_182 = 8e-6 per_ms;
  kon_183 = 3.28e-5 per_ms;
  koff_183 = 8e-6 per_ms;
  kon_184 = 3.28e-5 per_ms;
  koff_184 = 8e-6 per_ms;
  kon_185 = 3.28e-5 per_ms;
  koff_185 = 8e-6 per_ms;
  kon_186 = 3.28e-5 per_ms;
  koff_186 = 8e-6 per_ms;
  kon_187 = 3.28e-5 per_ms;
  koff_187 = 8e-6 per_ms;
  kon_188 = 3.28e-5 per_ms;
  koff_188 = 8e-6 per_ms;
  kon_189 = 3.28e-5 per_ms;
  koff_189 = 8e-6 per_ms;
  kon_190 = 0.0001 per_nM_per_ms;
  koff_190 = 0.001 per_ms;
  kon_191 = 4.6e-6 per_nM_per_ms;
  koff_191 = 0.044 per_ms;
  kon_192 = 0.011 per_ms;
  koff_192 = 0 per_nM_per_ms;
  kon_193 = 0.001 per_ms;
  koff_193 = 0 per_ms;
  kon_194 = 2.166e-5 per_nM_per_ms;
  koff_194 = 0.0034656 per_ms;
  kon_195 = 0.017233 per_ms;
  koff_195 = 0 per_nM_per_ms;
  kon_196 = 2.5e-7 per_nM_per_ms;
  koff_196 = 8e-5 per_ms;
  kon_197 = 2e-5 per_ms;
  koff_197 = 0 per_nM_per_ms;
  kon_198 = 2.5e-6 per_ms;
  koff_198 = 0 per_ms;
  kon_199 = 0.000433175 per_nM_per_ms;
  koff_199 = 0.069308 per_ms;
  kon_200 = 0.3446674 per_ms;
  koff_200 = 0 per_nM_per_ms;
  kon_201 = 2.5e-7 per_nM_per_ms;
  koff_201 = 8e-5 per_ms;
  kon_202 = 2e-5 per_ms;
  koff_202 = 0 per_nM_per_ms;
  kon_203 = 0.00024 per_ms;
  koff_203 = 2.55e-5 per_nM_per_ms;
  kon_204 = 0.0004 per_nM_per_ms;
  koff_204 = 20 per_ms;
  kon_205 = 0.0005 per_ms;
  koff_205 = 2e-10 per_ms;
  kon_206 = 4e-7 per_nM_per_ms;
  koff_206 = 0.001 per_ms;
  kon_207 = 7e-7 per_nM_per_ms;
  koff_207 = 0.0007 per_ms;
  kon_208 = 8e-5 per_nM_per_ms;
  koff_208 = 0.04 per_ms;
  kon_209 = 0.0001 per_nM_per_ms;
  koff_209 = 0.01 per_ms;
  kon_210 = 3e-8 per_nM_per_ms;
  koff_210 = 0.01 per_ms;
  kon_211 = 0.0003 per_ms;
  koff_211 = 0 per_nM_per_ms;
  kon_212 = 0.2 per_ms;
  koff_212 = 0 per_nM_per_ms;
  kon_213 = 1.5e-5 per_nM_per_ms;
  koff_213 = 0.075 per_ms;
  kon_214 = 0.25 per_ms;
  koff_214 = 0 per_nM_per_ms;
  kon_215 = 1 per_ms;
  koff_215 = 0 per_nM_per_ms;
  kon_216 = 2e-6 per_nM_per_ms;
  koff_216 = 0.001 per_ms;
  kon_217 = 0.001 per_ms;
  koff_217 = 0 per_nM_per_ms;
  kon_218 = 0.012 per_ms;
  koff_218 = 0 per_nM_per_ms;
  kon_219 = 0.012 per_ms;
  koff_219 = 0 per_nM_per_ms;
  kon_220 = 0.001 per_ms;
  koff_220 = 0 per_ms;
  kon_221 = 0.01 per_ms;
  koff_221 = 0 per_ms;
  kon_222 = 0.000125 per_nM_per_ms;
  koff_222 = 0.05 per_ms;
  kon_223 = 5e-7 per_nM_per_ms;
  koff_223 = 0.001 per_ms;
  kon_224 = 0.00025 per_ms;
  koff_224 = 0 per_nM_per_ms;
  kon_225 = 0.01 per_ms;
  koff_225 = 0 per_ms;
  kon_226 = 0.005 per_ms;
  koff_226 = 0 per_ms;
  kon_227 = 7e-8 per_nM_per_ms;
  koff_227 = 0.0008 per_ms;
  kon_228 = 0.0002 per_ms;
  koff_228 = 0 per_nM_per_ms;
  kon_229 = 1.33e-5 per_nM_per_ms;
  koff_229 = 0.05 per_ms;
  kon_230 = 1.5e-8 per_nM_per_ms;
  koff_230 = 0.00015 per_ms;
  kon_231 = 1.68e-8 per_nM_per_ms;
  koff_231 = 0.0001 per_ms;
  kon_232 = 6.25e-5 per_ms;
  koff_232 = 1e-6 per_ms;
  kon_233 = 9e-6 per_nM_per_ms;
  koff_233 = 0.00136 per_ms;
  kon_234 = 0.0015 per_ms;
  koff_234 = 0 per_nM_per_ms;
  kon_235 = 4e-7 per_nM_per_ms;
  koff_235 = 0.0008 per_ms;
  kon_236 = 0.0047 per_ms;
  kon_237 = 4e-7 per_nM_per_ms;
  koff_237 = 0.0008 per_ms;
  kon_238 = 0.0047 per_ms;
  kon_239 = 5e-7 per_nM_per_ms;
  koff_239 = 0.005 per_ms;
  kon_240 = 0.00015 per_ms;
  kon_241 = 4e-7 per_nM_per_ms;
  koff_241 = 0.0008 per_ms;
  kon_242 = 0.0047 per_ms;
  kon_243 = 4e-7 per_nM_per_ms;
  koff_243 = 0.0008 per_ms;
  kon_244 = 0.0047 per_ms;
  kon_245 = 5e-7 per_nM_per_ms;
  koff_245 = 0.005 per_ms;
  kon_246 = 0.00015 per_ms;
  kon_247 = 0.00024545 per_ms;
  koff_247 = 0.0003 per_ms;
  kon_248 = 0.00024545 per_ms;
  koff_248 = 0.0003 per_ms;
  kon_249 = 0.00024545 per_ms;
  koff_249 = 0.0003 per_ms;
  kon_250 = 0.0055 per_ms;
  koff_250 = 0.07 per_ms;
  kon_251 = 0.0055 per_ms;
  koff_251 = 0.07 per_ms;
  kon_252 = 9.5e-8 per_nM_per_ms;
  koff_252 = 0.0025 per_ms;
  kon_253 = 2.4e-5 per_nM_per_ms;
  koff_253 = 0.00042 per_ms;
  kon_254 = 5.76e-7 per_nM_per_ms;
  koff_254 = 0.00042 per_ms;
  kon_255 = 3.96e-6 per_nM_per_ms;
  koff_255 = 0.0025 per_ms;
  kon_256 = 0.0005 per_ms;
  koff_256 = 0 per_nM_per_ms;
  kon_257 = 0.006 per_ms;
  kon_258 = 6e-7 per_nM_per_ms;
  koff_258 = 0.003 per_ms;
  kon_259 = 2.2e-5 per_nM_per_ms;
  koff_259 = 0.444 per_ms;
  kon_260 = 0.111 per_ms;
  koff_260 = 0 per_nM_per_ms;
  kon_261 = 0.001 per_ms;
  koff_261 = 0 per_ms;
  kon_262 = 5e-9 per_nM_per_ms;
  koff_262 = 1.76e-7 per_ms;

  // Reactions:
  r1: Ca + PMCA => PMCACa; compartment*(kon_1*Ca*PMCA - koff_1*PMCACa);
  r2: PMCACa => PMCA + CaOut; compartment*(kon_2*PMCACa - koff_2*PMCA*CaOut);
  r3: Ca + NCX => NCXCa; compartment*(kon_3*Ca*NCX - koff_3*NCXCa);
  r4: NCXCa => NCX + CaOut; compartment*(kon_4*NCXCa - koff_4*NCX*CaOut);
  r5: CaOut + Leak => CaOutLeak; compartment*(kon_5*CaOut*Leak - koff_5*CaOutLeak);
  r6: CaOutLeak => Ca + Leak; compartment*(kon_6*CaOutLeak - koff_6*Ca*Leak);
  r7: Ca + Calbin => CalbinC; compartment*(kon_7*Ca*Calbin - koff_7*CalbinC);
  r8: L => LOut; compartment*(kon_8*L - koff_8*LOut);
  r9: L + R => LR; compartment*(kon_9*L*R - koff_9*LR);
  r10: LR + Gs => LRGs; compartment*(kon_10*LR*Gs - koff_10*LRGs);
  r11: Gs + R => GsR; compartment*(kon_11*Gs*R - koff_11*GsR);
  r12: GsR + L => LRGs; compartment*(kon_12*GsR*L - koff_12*LRGs);
  r13: LRGs => LRGsbg + GsaGTP; compartment*(kon_13*LRGs - koff_13*LRGsbg*GsaGTP);
  r14: LRGsbg => LR + Gsbg; compartment*(kon_14*LRGsbg - koff_14*LR*Gsbg);
  r15: LR + PKAc => PKAcLR; compartment*(kon_15*LR*PKAc - koff_15*PKAcLR);
  r16: PKAcLR => pLR + PKAc; compartment*(kon_16*PKAcLR - koff_16*pLR*PKAc);
  r17: pLR + PKAc => PKAcpLR; compartment*(kon_17*pLR*PKAc - koff_17*PKAcpLR);
  r18: PKAcpLR => ppLR + PKAc; compartment*(kon_18*PKAcpLR - koff_18*ppLR*PKAc);
  r19: ppLR + PKAc => PKAcppLR; compartment*(kon_19*ppLR*PKAc - koff_19*PKAcppLR);
  r20: PKAcppLR => pppLR + PKAc; compartment*(kon_20*PKAcppLR - koff_20*pppLR*PKAc);
  r21: pppLR + PKAc => PKAcpppLR; compartment*(kon_21*pppLR*PKAc - koff_21*PKAcpppLR);
  r22: PKAcpppLR => ppppLR + PKAc; compartment*(kon_22*PKAcpppLR - koff_22*ppppLR*PKAc);
  r23: ppppLR + Gi => ppppLRGi; compartment*(kon_23*ppppLR*Gi - koff_23*ppppLRGi);
  r24: ppppLRGi => ppppLRGibg + GiaGTP; compartment*(kon_24*ppppLRGi - koff_24*ppppLRGibg*GiaGTP);
  r25: ppppLRGibg => ppppLR + Gibg; compartment*(kon_25*ppppLRGibg - koff_25*ppppLR*Gibg);
  r26: pLR => LR; compartment*(kon_26*pLR - koff_26*LR);
  r27: ppLR => pLR; compartment*(kon_27*ppLR - koff_27*pLR);
  r28: pppLR => ppLR; compartment*(kon_28*pppLR - koff_28*ppLR);
  r29: ppppLR => pppLR; compartment*(kon_29*ppppLR - koff_29*pppLR);
  r30: R + PKAc => PKAcR; compartment*(kon_30*R*PKAc - koff_30*PKAcR);
  r31: PKAcR => pR + PKAc; compartment*(kon_31*PKAcR - koff_31*pR*PKAc);
  r32: pR + PKAc => PKAcpR; compartment*(kon_32*pR*PKAc - koff_32*PKAcpR);
  r33: PKAcpR => ppR + PKAc; compartment*(kon_33*PKAcpR - koff_33*ppR*PKAc);
  r34: ppR + PKAc => PKAcppR; compartment*(kon_34*ppR*PKAc - koff_34*PKAcppR);
  r35: PKAcppR => pppR + PKAc; compartment*(kon_35*PKAcppR - koff_35*pppR*PKAc);
  r36: pppR + PKAc => PKAcpppR; compartment*(kon_36*pppR*PKAc - koff_36*PKAcpppR);
  r37: PKAcpppR => ppppR + PKAc; compartment*(kon_37*PKAcpppR - koff_37*ppppR*PKAc);
  r38: ppppR + Gi => ppppRGi; compartment*(kon_38*ppppR*Gi - koff_38*ppppRGi);
  r39: ppppRGi => ppppRGibg + GiaGTP; compartment*(kon_39*ppppRGi - koff_39*ppppRGibg*GiaGTP);
  r40: ppppRGibg => ppppR + Gibg; compartment*(kon_40*ppppRGibg - koff_40*ppppR*Gibg);
  r41: pR => R; compartment*(kon_41*pR - koff_41*R);
  r42: ppR => pR; compartment*(kon_42*ppR - koff_42*pR);
  r43: pppR => ppR; compartment*(kon_43*pppR - koff_43*ppR);
  r44: ppppR => pppR; compartment*(kon_44*ppppR - koff_44*pppR);
  r45: GsaGTP => GsaGDP; compartment*(kon_45*GsaGTP - koff_45*GsaGDP);
  r46: GsaGDP + Gsbg => Gs; compartment*(kon_46*GsaGDP*Gsbg - koff_46*Gs);
  r47: GiaGTP => GiaGDP; compartment*(kon_47*GiaGTP - koff_47*GiaGDP);
  r48: GiaGDP + Gibg => Gi; compartment*(kon_48*GiaGDP*Gibg - koff_48*Gi);
  r49: GsaGTP + AC1 => AC1GsaGTP; compartment*(kon_49*GsaGTP*AC1 - koff_49*AC1GsaGTP);
  r50: AC1GsaGTP + CaMCa4 => AC1GsaGTPCaMCa4; compartment*(kon_50*AC1GsaGTP*CaMCa4 - koff_50*AC1GsaGTPCaMCa4);
  r51: AC1GsaGTPCaMCa4 + ATP => AC1GsaGTPCaMCa4ATP; compartment*(kon_51*AC1GsaGTPCaMCa4*ATP - koff_51*AC1GsaGTPCaMCa4ATP);
  r52: AC1GsaGTPCaMCa4ATP => cAMP + AC1GsaGTPCaMCa4; compartment*(kon_52*AC1GsaGTPCaMCa4ATP - koff_52*cAMP*AC1GsaGTPCaMCa4);
  r53: GiaGTP + AC1GsaGTP => AC1GsaGTPGiaGTP; compartment*(kon_53*GiaGTP*AC1GsaGTP - koff_53*AC1GsaGTPGiaGTP);
  r54: AC1GsaGTPGiaGTP + CaMCa4 => AC1GsaGTPGiaGTPCaMCa4; compartment*(kon_54*AC1GsaGTPGiaGTP*CaMCa4 - koff_54*AC1GsaGTPGiaGTPCaMCa4);
  r55: AC1GsaGTPGiaGTPCaMCa4 + ATP => AC1GsGiCaMCa4ATP; compartment*(kon_55*AC1GsaGTPGiaGTPCaMCa4*ATP - koff_55*AC1GsGiCaMCa4ATP);
  r56: AC1GsGiCaMCa4ATP => cAMP + AC1GsaGTPGiaGTPCaMCa4; compartment*(kon_56*AC1GsGiCaMCa4ATP - koff_56*cAMP*AC1GsaGTPGiaGTPCaMCa4);
  r57: GiaGTP + AC1CaMCa4 => AC1GiaGTPCaMCa4; compartment*(kon_57*GiaGTP*AC1CaMCa4 - koff_57*AC1GiaGTPCaMCa4);
  r58: AC1GiaGTPCaMCa4 + ATP => AC1GiaGTPCaMCa4ATP; compartment*(kon_58*AC1GiaGTPCaMCa4*ATP - koff_58*AC1GiaGTPCaMCa4ATP);
  r59: AC1GiaGTPCaMCa4ATP => cAMP + AC1GiaGTPCaMCa4; compartment*(kon_59*AC1GiaGTPCaMCa4ATP - koff_59*cAMP*AC1GiaGTPCaMCa4);
  r60: AC1 + CaMCa4 => AC1CaMCa4; compartment*(kon_60*AC1*CaMCa4 - koff_60*AC1CaMCa4);
  r61: AC1CaMCa4 + ATP => AC1CaMCa4ATP; compartment*(kon_61*AC1CaMCa4*ATP - koff_61*AC1CaMCa4ATP);
  r62: AC1CaMCa4ATP => cAMP + AC1CaMCa4; compartment*(kon_62*AC1CaMCa4ATP - koff_62*cAMP*AC1CaMCa4);
  r63: AC1GiaGTP + GsaGTP => AC1GsaGTPGiaGTP; compartment*(kon_63*AC1GiaGTP*GsaGTP - koff_63*AC1GsaGTPGiaGTP);
  r64: AC8 + CaMCa4 => AC8CaMCa4; compartment*(kon_64*AC8*CaMCa4 - koff_64*AC8CaMCa4);
  r65: AC8CaMCa4 + ATP => AC8CaMCa4ATP; compartment*(kon_65*AC8CaMCa4*ATP - koff_65*AC8CaMCa4ATP);
  r66: AC8CaMCa4ATP => cAMP + AC8CaMCa4; compartment*(kon_66*AC8CaMCa4ATP - koff_66*cAMP*AC8CaMCa4);
  r67: CaM + Ca => CaMCa2; compartment*(kon_67*CaM*Ca^2 - koff_67*CaMCa2);
  r68: CaMCa2 + Ca => CaMCa3; compartment*(kon_68*CaMCa2*Ca - koff_68*CaMCa3);
  r69: CaMCa3 + Ca => CaMCa4; compartment*(kon_69*CaMCa3*Ca - koff_69*CaMCa4);
  r70: CaM + Ng => NgCaM; compartment*(kon_70*CaM*Ng - koff_70*NgCaM);
  r71: CaM + PP2B => PP2BCaM; compartment*(kon_71*CaM*PP2B - koff_71*PP2BCaM);
  r72: CaMCa2 + PP2B => PP2BCaMCa2; compartment*(kon_72*CaMCa2*PP2B - koff_72*PP2BCaMCa2);
  r73: CaMCa4 + PP2B => PP2BCaMCa4; compartment*(kon_73*CaMCa4*PP2B - koff_73*PP2BCaMCa4);
  r74: PP2BCaM + Ca => PP2BCaMCa2; compartment*(kon_74*PP2BCaM*Ca^2 - koff_74*PP2BCaMCa2);
  r75: PP2BCaMCa2 + Ca => PP2BCaMCa3; compartment*(kon_75*PP2BCaMCa2*Ca - koff_75*PP2BCaMCa3);
  r76: PP2BCaMCa3 + Ca => PP2BCaMCa4; compartment*(kon_76*PP2BCaMCa3*Ca - koff_76*PP2BCaMCa4);
  r77: CaMCa4 + CK => CKCaMCa4; compartment*(kon_77*CaMCa4*CK - koff_77*CKCaMCa4);
  r78: CKCaMCa4 => Complex; compartment*(kon_78*CKCaMCa4^2 - koff_78*Complex);
  r79: CKpCaMCa4 + CKCaMCa4 => pComplex; compartment*(kon_79*CKpCaMCa4*CKCaMCa4 - koff_79*pComplex);
  r80: CKpCaMCa4 + Complex => CKpCaMCa4 + pComplex; compartment*(kon_80*CKpCaMCa4*Complex - koff_80*CKpCaMCa4*pComplex);
  r81: CKCaMCa4 + Complex => CKCaMCa4 + pComplex; compartment*(kon_81*CKCaMCa4*Complex - koff_81*CKCaMCa4*pComplex);
  r82: Complex => Complex + pComplex; compartment*(kon_82*Complex^2 - koff_82*Complex*pComplex);
  r83: Complex + pComplex => pComplex; compartment*(kon_83*Complex*pComplex - koff_83*pComplex);
  r84: CKpCaMCa4 => CaMCa4 + CKp; compartment*(kon_84*CKpCaMCa4 - koff_84*CaMCa4*CKp);
  r85: CKp + PP1 => CKpPP1; compartment*(kon_85*CKp*PP1 - koff_85*CKpPP1);
  r86: CKpPP1 => PP1 + CK; compartment*(kon_86*CKpPP1 - koff_86*PP1*CK);
  r87: CKpCaMCa4 + PP1 => CKpCaMCa4PP1; compartment*(kon_87*CKpCaMCa4*PP1 - koff_87*CKpCaMCa4PP1);
  r88: CKpCaMCa4PP1 => PP1 + CKCaMCa4; compartment*(kon_88*CKpCaMCa4PP1 - koff_88*PP1*CKCaMCa4);
  r89: PKA + cAMP => PKAcAMP4; compartment*(kon_89*PKA*cAMP^4 - koff_89*PKAcAMP4);
  r90: Epac1 + cAMP => Epac1cAMP; compartment*(kon_90*Epac1*cAMP - koff_90*Epac1cAMP);
  r91: I1 + PKAc => I1PKAc; compartment*(kon_91*I1*PKAc - koff_91*I1PKAc);
  r92: I1PKAc => Ip35 + PKAc; compartment*(kon_92*I1PKAc - koff_92*Ip35*PKAc);
  r93: Ip35 + PP1 => Ip35PP1; compartment*(kon_93*Ip35*PP1 - koff_93*Ip35PP1);
  r94: Ip35 + PP2BCaMCa4 => Ip35PP2BCaMCa4; compartment*(kon_94*Ip35*PP2BCaMCa4 - koff_94*Ip35PP2BCaMCa4);
  r95: Ip35PP2BCaMCa4 => I1 + PP2BCaMCa4; compartment*(kon_95*Ip35PP2BCaMCa4 - koff_95*I1*PP2BCaMCa4);
  r96: Ip35PP1 + PP2BCaMCa4 => Ip35PP1PP2BCaMCa4; compartment*(kon_96*Ip35PP1*PP2BCaMCa4 - koff_96*Ip35PP1PP2BCaMCa4);
  r97: Ip35PP1PP2BCaMCa4 => I1 + PP1PP2BCaMCa4; compartment*(kon_97*Ip35PP1PP2BCaMCa4 - koff_97*I1*PP1PP2BCaMCa4);
  r98: PP1PP2BCaMCa4 => PP1 + PP2BCaMCa4; compartment*(kon_98*PP1PP2BCaMCa4 - koff_98*PP1*PP2BCaMCa4);
  r99: GluR1 + PKAc => GluR1_PKAc; compartment*(kon_99*GluR1*PKAc - koff_99*GluR1_PKAc);
  r100: GluR1_PKAc => GluR1_S845 + PKAc; compartment*kon_100*GluR1_PKAc;
  r101: GluR1 + CKCaMCa4 => GluR1_CKCam; compartment*(kon_101*GluR1*CKCaMCa4 - koff_101*GluR1_CKCam);
  r102: GluR1_CKCam => GluR1_S831 + CKCaMCa4; compartment*kon_102*GluR1_CKCam;
  r103: GluR1 + CKpCaMCa4 => GluR1_CKpCam; compartment*(kon_103*GluR1*CKpCaMCa4 - koff_103*GluR1_CKpCam);
  r104: GluR1_CKpCam => GluR1_S831 + CKpCaMCa4; compartment*kon_104*GluR1_CKpCam;
  r105: GluR1 + CKp => GluR1_CKp; compartment*(kon_105*GluR1*CKp - koff_105*GluR1_CKp);
  r106: GluR1_CKp => GluR1_S831 + CKp; compartment*kon_106*GluR1_CKp;
  r107: GluR1 + PKCt => GluR1_PKCt; compartment*(kon_107*GluR1*PKCt - koff_107*GluR1_PKCt);
  r108: GluR1_PKCt => GluR1_S831 + PKCt; compartment*kon_108*GluR1_PKCt;
  r109: GluR1 + PKCp => GluR1_PKCp; compartment*(kon_109*GluR1*PKCp - koff_109*GluR1_PKCp);
  r110: GluR1_PKCp => GluR1_S831 + PKCp; compartment*kon_110*GluR1_PKCp;
  r111: GluR1_S845 + CKCaMCa4 => GluR1_S845_CKCam; compartment*(kon_111*GluR1_S845*CKCaMCa4 - koff_111*GluR1_S845_CKCam);
  r112: GluR1_S845_CKCam => GluR1_S845_S831 + CKCaMCa4; compartment*kon_112*GluR1_S845_CKCam;
  r113: GluR1_S845 + CKpCaMCa4 => GluR1_S845_CKpCam; compartment*(kon_113*GluR1_S845*CKpCaMCa4 - koff_113*GluR1_S845_CKpCam);
  r114: GluR1_S845_CKpCam => GluR1_S845_S831 + CKpCaMCa4; compartment*kon_114*GluR1_S845_CKpCam;
  r115: GluR1_S845 + CKp => GluR1_S845_CKp; compartment*(kon_115*GluR1_S845*CKp - koff_115*GluR1_S845_CKp);
  r116: GluR1_S845_CKp => GluR1_S845_S831 + CKp; compartment*kon_116*GluR1_S845_CKp;
  r117: GluR1_S845 + PKCt => GluR1_S845_PKCt; compartment*(kon_117*GluR1_S845*PKCt - koff_117*GluR1_S845_PKCt);
  r118: GluR1_S845_PKCt => GluR1_S845_S831 + PKCt; compartment*kon_118*GluR1_S845_PKCt;
  r119: GluR1_S845 + PKCp => GluR1_S845_PKCp; compartment*(kon_119*GluR1_S845*PKCp - koff_119*GluR1_S845_PKCp);
  r120: GluR1_S845_PKCp => GluR1_S845_S831 + PKCp; compartment*kon_120*GluR1_S845_PKCp;
  r121: GluR1_S831 + PKAc => GluR1_S831_PKAc; compartment*(kon_121*GluR1_S831*PKAc - koff_121*GluR1_S831_PKAc);
  r122: GluR1_S831_PKAc => GluR1_S845_S831 + PKAc; compartment*kon_122*GluR1_S831_PKAc;
  r123: GluR1_S845 + PP1 => GluR1_S845_PP1; compartment*(kon_123*GluR1_S845*PP1 - koff_123*GluR1_S845_PP1);
  r124: GluR1_S845_PP1 => GluR1 + PP1; compartment*kon_124*GluR1_S845_PP1;
  r125: GluR1_S845_S831 + PP1 => GluR1_S845_S831_PP1; compartment*(kon_125*GluR1_S845_S831*PP1 - koff_125*GluR1_S845_S831_PP1);
  r126: GluR1_S845_S831_PP1 => GluR1_S845 + PP1; compartment*kon_126*GluR1_S845_S831_PP1;
  r127: GluR1_S845_S831_PP1 => GluR1_S831 + PP1; compartment*kon_127*GluR1_S845_S831_PP1;
  r128: GluR1_S831 + PP1 => GluR1_S831_PP1; compartment*(kon_128*GluR1_S831*PP1 - koff_128*GluR1_S831_PP1);
  r129: GluR1_S831_PP1 => GluR1 + PP1; compartment*kon_129*GluR1_S831_PP1;
  r130: GluR1_S845 + PP2BCaMCa4 => GluR1_S845_PP2B; compartment*(kon_130*GluR1_S845*PP2BCaMCa4 - koff_130*GluR1_S845_PP2B);
  r131: GluR1_S845_PP2B => GluR1 + PP2BCaMCa4; compartment*kon_131*GluR1_S845_PP2B;
  r132: GluR1_S845_S831 + PP2BCaMCa4 => GluR1_S845_S831_PP2B; compartment*(kon_132*GluR1_S845_S831*PP2BCaMCa4 - koff_132*GluR1_S845_S831_PP2B);
  r133: GluR1_S845_S831_PP2B => GluR1_S831 + PP2BCaMCa4; compartment*kon_133*GluR1_S845_S831_PP2B;
  r134: GluR1_memb + PKAc => GluR1_memb_PKAc; compartment*(kon_134*GluR1_memb*PKAc - koff_134*GluR1_memb_PKAc);
  r135: GluR1_memb_PKAc => GluR1_memb_S845 + PKAc; compartment*kon_135*GluR1_memb_PKAc;
  r136: GluR1_memb + CKCaMCa4 => GluR1_memb_CKCam; compartment*(kon_136*GluR1_memb*CKCaMCa4 - koff_136*GluR1_memb_CKCam);
  r137: GluR1_memb_CKCam => GluR1_memb_S831 + CKCaMCa4; compartment*kon_137*GluR1_memb_CKCam;
  r138: GluR1_memb + CKpCaMCa4 => GluR1_memb_CKpCam; compartment*(kon_138*GluR1_memb*CKpCaMCa4 - koff_138*GluR1_memb_CKpCam);
  r139: GluR1_memb_CKpCam => GluR1_memb_S831 + CKpCaMCa4; compartment*kon_139*GluR1_memb_CKpCam;
  r140: GluR1_memb + CKp => GluR1_memb_CKp; compartment*(kon_140*GluR1_memb*CKp - koff_140*GluR1_memb_CKp);
  r141: GluR1_memb_CKp => GluR1_memb_S831 + CKp; compartment*kon_141*GluR1_memb_CKp;
  r142: GluR1_memb + PKCt => GluR1_memb_PKCt; compartment*(kon_142*GluR1_memb*PKCt - koff_142*GluR1_memb_PKCt);
  r143: GluR1_memb_PKCt => GluR1_memb_S831 + PKCt; compartment*kon_143*GluR1_memb_PKCt;
  r144: GluR1_memb + PKCp => GluR1_memb_PKCp; compartment*(kon_144*GluR1_memb*PKCp - koff_144*GluR1_memb_PKCp);
  r145: GluR1_memb_PKCp => GluR1_memb_S831 + PKCp; compartment*kon_145*GluR1_memb_PKCp;
  r146: GluR1_memb_S845 + CKCaMCa4 => GluR1_memb_S845_CKCam; compartment*(kon_146*GluR1_memb_S845*CKCaMCa4 - koff_146*GluR1_memb_S845_CKCam);
  r147: GluR1_memb_S845_CKCam => GluR1_memb_S845_S831 + CKCaMCa4; compartment*kon_147*GluR1_memb_S845_CKCam;
  r148: GluR1_memb_S845 + CKpCaMCa4 => GluR1_memb_S845_CKpCam; compartment*(kon_148*GluR1_memb_S845*CKpCaMCa4 - koff_148*GluR1_memb_S845_CKpCam);
  r149: GluR1_memb_S845_CKpCam => GluR1_memb_S845_S831 + CKpCaMCa4; compartment*kon_149*GluR1_memb_S845_CKpCam;
  r150: GluR1_memb_S845 + CKp => GluR1_memb_S845_CKp; compartment*(kon_150*GluR1_memb_S845*CKp - koff_150*GluR1_memb_S845_CKp);
  r151: GluR1_memb_S845_CKp => GluR1_memb_S845_S831 + CKp; compartment*kon_151*GluR1_memb_S845_CKp;
  r152: GluR1_memb_S845 + PKCt => GluR1_memb_S845_PKCt; compartment*(kon_152*GluR1_memb_S845*PKCt - koff_152*GluR1_memb_S845_PKCt);
  r153: GluR1_memb_S845_PKCt => GluR1_memb_S845_S831 + PKCt; compartment*kon_153*GluR1_memb_S845_PKCt;
  r154: GluR1_memb_S845 + PKCp => GluR1_memb_S845_PKCp; compartment*(kon_154*GluR1_memb_S845*PKCp - koff_154*GluR1_memb_S845_PKCp);
  r155: GluR1_memb_S845_PKCp => GluR1_memb_S845_S831 + PKCp; compartment*kon_155*GluR1_memb_S845_PKCp;
  r156: GluR1_memb_S831 + PKAc => GluR1_memb_S831_PKAc; compartment*(kon_156*GluR1_memb_S831*PKAc - koff_156*GluR1_memb_S831_PKAc);
  r157: GluR1_memb_S831_PKAc => GluR1_memb_S845_S831 + PKAc; compartment*kon_157*GluR1_memb_S831_PKAc;
  r158: GluR1_memb_S845 + PP1 => GluR1_memb_S845_PP1; compartment*(kon_158*GluR1_memb_S845*PP1 - koff_158*GluR1_memb_S845_PP1);
  r159: GluR1_memb_S845_PP1 => GluR1_memb + PP1; compartment*kon_159*GluR1_memb_S845_PP1;
  r160: GluR1_memb_S845_S831 + PP1 => GluR1_memb_S845_S831_PP1; compartment*(kon_160*GluR1_memb_S845_S831*PP1 - koff_160*GluR1_memb_S845_S831_PP1);
  r161: GluR1_memb_S845_S831_PP1 => GluR1_memb_S845 + PP1; compartment*kon_161*GluR1_memb_S845_S831_PP1;
  r162: GluR1_memb_S845_S831_PP1 => GluR1_memb_S831 + PP1; compartment*kon_162*GluR1_memb_S845_S831_PP1;
  r163: GluR1_memb_S831 + PP1 => GluR1_memb_S831_PP1; compartment*(kon_163*GluR1_memb_S831*PP1 - koff_163*GluR1_memb_S831_PP1);
  r164: GluR1_memb_S831_PP1 => GluR1_memb + PP1; compartment*kon_164*GluR1_memb_S831_PP1;
  r165: GluR1_memb_S845 + PP2BCaMCa4 => GluR1_memb_S845_PP2B; compartment*(kon_165*GluR1_memb_S845*PP2BCaMCa4 - koff_165*GluR1_memb_S845_PP2B);
  r166: GluR1_memb_S845_PP2B => GluR1_memb + PP2BCaMCa4; compartment*kon_166*GluR1_memb_S845_PP2B;
  r167: GluR1_memb_S845_S831 + PP2BCaMCa4 => GluR1_memb_S845_S831_PP2B; compartment*(kon_167*GluR1_memb_S845_S831*PP2BCaMCa4 - koff_167*GluR1_memb_S845_S831_PP2B);
  r168: GluR1_memb_S845_S831_PP2B => GluR1_memb_S831 + PP2BCaMCa4; compartment*kon_168*GluR1_memb_S845_S831_PP2B;
  r169: GluR1 => GluR1_memb; compartment*(kon_169*GluR1 - koff_169*GluR1_memb);
  r170: GluR1_PKAc => GluR1_memb_PKAc; compartment*(kon_170*GluR1_PKAc - koff_170*GluR1_memb_PKAc);
  r171: GluR1_CKCam => GluR1_memb_CKCam; compartment*(kon_171*GluR1_CKCam - koff_171*GluR1_memb_CKCam);
  r172: GluR1_CKpCam => GluR1_memb_CKpCam; compartment*(kon_172*GluR1_CKpCam - koff_172*GluR1_memb_CKpCam);
  r173: GluR1_CKp => GluR1_memb_CKp; compartment*(kon_173*GluR1_CKp - koff_173*GluR1_memb_CKp);
  r174: GluR1_PKCt => GluR1_memb_PKCt; compartment*(kon_174*GluR1_PKCt - koff_174*GluR1_memb_PKCt);
  r175: GluR1_PKCp => GluR1_memb_PKCp; compartment*(kon_175*GluR1_PKCp - koff_175*GluR1_memb_PKCp);
  r176: GluR1_S831 => GluR1_memb_S831; compartment*(kon_176*GluR1_S831 - koff_176*GluR1_memb_S831);
  r177: GluR1_S831_PKAc => GluR1_memb_S831_PKAc; compartment*(kon_177*GluR1_S831_PKAc - koff_177*GluR1_memb_S831_PKAc);
  r178: GluR1_S831_PP1 => GluR1_memb_S831_PP1; compartment*(kon_178*GluR1_S831_PP1 - koff_178*GluR1_memb_S831_PP1);
  r179: GluR1_S845 => GluR1_memb_S845; compartment*(kon_179*GluR1_S845 - koff_179*GluR1_memb_S845);
  r180: GluR1_S845_CKCam => GluR1_memb_S845_CKCam; compartment*(kon_180*GluR1_S845_CKCam - koff_180*GluR1_memb_S845_CKCam);
  r181: GluR1_S845_CKpCam => GluR1_memb_S845_CKpCam; compartment*(kon_181*GluR1_S845_CKpCam - koff_181*GluR1_memb_S845_CKpCam);
  r182: GluR1_S845_CKp => GluR1_memb_S845_CKp; compartment*(kon_182*GluR1_S845_CKp - koff_182*GluR1_memb_S845_CKp);
  r183: GluR1_S845_PKCt => GluR1_memb_S845_PKCt; compartment*(kon_183*GluR1_S845_PKCt - koff_183*GluR1_memb_S845_PKCt);
  r184: GluR1_S845_PKCp => GluR1_memb_S845_PKCp; compartment*(kon_184*GluR1_S845_PKCp - koff_184*GluR1_memb_S845_PKCp);
  r185: GluR1_S845_S831 => GluR1_memb_S845_S831; compartment*(kon_185*GluR1_S845_S831 - koff_185*GluR1_memb_S845_S831);
  r186: GluR1_S845_PP1 => GluR1_memb_S845_PP1; compartment*(kon_186*GluR1_S845_PP1 - koff_186*GluR1_memb_S845_PP1);
  r187: GluR1_S845_S831_PP1 => GluR1_memb_S845_S831_PP1; compartment*(kon_187*GluR1_S845_S831_PP1 - koff_187*GluR1_memb_S845_S831_PP1);
  r188: GluR1_S845_PP2B => GluR1_memb_S845_PP2B; compartment*(kon_188*GluR1_S845_PP2B - koff_188*GluR1_memb_S845_PP2B);
  r189: GluR1_S845_S831_PP2B => GluR1_memb_S845_S831_PP2B; compartment*(kon_189*GluR1_S845_S831_PP2B - koff_189*GluR1_memb_S845_S831_PP2B);
  r190: PDE1 + CaMCa4 => PDE1CaMCa4; compartment*(kon_190*PDE1*CaMCa4 - koff_190*PDE1CaMCa4);
  r191: PDE1CaMCa4 + cAMP => PDE1CaMCa4cAMP; compartment*(kon_191*PDE1CaMCa4*cAMP - koff_191*PDE1CaMCa4cAMP);
  r192: PDE1CaMCa4cAMP => PDE1CaMCa4 + AMP; compartment*(kon_192*PDE1CaMCa4cAMP - koff_192*PDE1CaMCa4*AMP);
  r193: AMP => ATP; compartment*(kon_193*AMP - koff_193*ATP);
  r194: PDE4 + cAMP => PDE4cAMP; compartment*(kon_194*PDE4*cAMP - koff_194*PDE4cAMP);
  r195: PDE4cAMP => PDE4 + AMP; compartment*(kon_195*PDE4cAMP - koff_195*PDE4*AMP);
  r196: PKAc + PDE4 => PKAcPDE4; compartment*(kon_196*PKAc*PDE4 - koff_196*PKAcPDE4);
  r197: PKAcPDE4 => pPDE4 + PKAc; compartment*(kon_197*PKAcPDE4 - koff_197*pPDE4*PKAc);
  r198: pPDE4 => PDE4; compartment*(kon_198*pPDE4 - koff_198*PDE4);
  r199: pPDE4 + cAMP => pPDE4cAMP; compartment*(kon_199*pPDE4*cAMP - koff_199*pPDE4cAMP);
  r200: pPDE4cAMP => pPDE4 + AMP; compartment*(kon_200*pPDE4cAMP - koff_200*pPDE4*AMP);
  r201: PDE4cAMP + PKAc => PKAc_PDE4_cAMP; compartment*(kon_201*PDE4cAMP*PKAc - koff_201*PKAc_PDE4_cAMP);
  r202: PKAc_PDE4_cAMP => pPDE4cAMP + PKAc; compartment*(kon_202*PKAc_PDE4_cAMP - koff_202*pPDE4cAMP*PKAc);
  r203: PKAcAMP4 => PKAr + PKAc; compartment*(kon_203*PKAcAMP4 - koff_203*PKAr*PKAc);
  r204: Ca + fixedbuffer => fixedbufferCa; compartment*(kon_204*Ca*fixedbuffer - koff_204*fixedbufferCa);
  r205: Glu => GluOut; compartment*(kon_205*Glu - koff_205*GluOut);
  r206: Ca + PLC => PLCCa; compartment*(kon_206*Ca*PLC - koff_206*PLCCa);
  r207: GqaGTP + PLC => PLCGqaGTP; compartment*(kon_207*GqaGTP*PLC - koff_207*PLCGqaGTP);
  r208: Ca + PLCGqaGTP => PLCCaGqaGTP; compartment*(kon_208*Ca*PLCGqaGTP - koff_208*PLCCaGqaGTP);
  r209: GqaGTP + PLCCa => PLCCaGqaGTP; compartment*(kon_209*GqaGTP*PLCCa - koff_209*PLCCaGqaGTP);
  r210: PLCCa + Pip2 => PLCCaPip2; compartment*(kon_210*PLCCa*Pip2 - koff_210*PLCCaPip2);
  r211: PLCCaPip2 => PLCCaDAG + Ip3; compartment*(kon_211*PLCCaPip2 - koff_211*PLCCaDAG*Ip3);
  r212: PLCCaDAG => PLCCa + DAG; compartment*(kon_212*PLCCaDAG - koff_212*PLCCa*DAG);
  r213: PLCCaGqaGTP + Pip2 => PLCCaGqaGTPPip2; compartment*(kon_213*PLCCaGqaGTP*Pip2 - koff_213*PLCCaGqaGTPPip2);
  r214: PLCCaGqaGTPPip2 => PLCCaGqaGTPDAG + Ip3; compartment*(kon_214*PLCCaGqaGTPPip2 - koff_214*PLCCaGqaGTPDAG*Ip3);
  r215: PLCCaGqaGTPDAG => PLCCaGqaGTP + DAG; compartment*(kon_215*PLCCaGqaGTPDAG - koff_215*PLCCaGqaGTP*DAG);
  r216: Ip3degrad + PIkinase => Ip3degPIk; compartment*(kon_216*Ip3degrad*PIkinase - koff_216*Ip3degPIk);
  r217: Ip3degPIk => PIkinase + Pip2; compartment*(kon_217*Ip3degPIk - koff_217*PIkinase*Pip2);
  r218: PLCGqaGTP => PLC + GqaGDP; compartment*(kon_218*PLCGqaGTP - koff_218*PLC*GqaGDP);
  r219: PLCCaGqaGTP => PLCCa + GqaGDP; compartment*(kon_219*PLCCaGqaGTP - koff_219*PLCCa*GqaGDP);
  r220: GqaGTP => GqaGDP; compartment*(kon_220*GqaGTP - koff_220*GqaGDP);
  r221: GqaGDP => Gqabg; compartment*(kon_221*GqaGDP - koff_221*Gqabg);
  r222: Ca + DGL => CaDGL; compartment*(kon_222*Ca*DGL - koff_222*CaDGL);
  r223: DAG + CaDGL => DAGCaDGL; compartment*(kon_223*DAG*CaDGL - koff_223*DAGCaDGL);
  r224: DAGCaDGL => CaDGL + _2AG; compartment*(kon_224*DAGCaDGL - koff_224*CaDGL*_2AG);
  r225: Ip3 => Ip3degrad; compartment*(kon_225*Ip3 - koff_225*Ip3degrad);
  r226: _2AG => _2AGdegrad; compartment*(kon_226*_2AG - koff_226*_2AGdegrad);
  r227: DAG + DAGK => DAGKdag; compartment*(kon_227*DAG*DAGK - koff_227*DAGKdag);
  r228: DAGKdag => DAGK + PA; compartment*(kon_228*DAGKdag - koff_228*DAGK*PA);
  r229: Ca + PKC => PKCCa; compartment*(kon_229*Ca*PKC - koff_229*PKCCa);
  r230: PKCCa + DAG => PKCt; compartment*(kon_230*PKCCa*DAG - koff_230*PKCt);
  r231: Glu + MGluR => MGluR_Glu; compartment*(kon_231*Glu*MGluR - koff_231*MGluR_Glu);
  r232: MGluR_Glu => MGluR_Glu_desens; compartment*(kon_232*MGluR_Glu - koff_232*MGluR_Glu_desens);
  r233: Gqabg + MGluR_Glu => MGluR_Gqabg_Glu; compartment*(kon_233*Gqabg*MGluR_Glu - koff_233*MGluR_Gqabg_Glu);
  r234: MGluR_Gqabg_Glu => GqaGTP + MGluR_Glu; compartment*(kon_234*MGluR_Gqabg_Glu - koff_234*GqaGTP*MGluR_Glu);
  r235: GluR2 + PKCt => GluR2_PKCt; compartment*(kon_235*GluR2*PKCt - koff_235*GluR2_PKCt);
  r236: GluR2_PKCt => GluR2_S880 + PKCt; compartment*kon_236*GluR2_PKCt;
  r237: GluR2 + PKCp => GluR2_PKCp; compartment*(kon_237*GluR2*PKCp - koff_237*GluR2_PKCp);
  r238: GluR2_PKCp => GluR2_S880 + PKCp; compartment*kon_238*GluR2_PKCp;
  r239: GluR2_S880 + PP2A => GluR2_S880_PP2A; compartment*(kon_239*GluR2_S880*PP2A - koff_239*GluR2_S880_PP2A);
  r240: GluR2_S880_PP2A => GluR2 + PP2A; compartment*kon_240*GluR2_S880_PP2A;
  r241: GluR2_memb + PKCt => GluR2_memb_PKCt; compartment*(kon_241*GluR2_memb*PKCt - koff_241*GluR2_memb_PKCt);
  r242: GluR2_memb_PKCt => GluR2_memb_S880 + PKCt; compartment*kon_242*GluR2_memb_PKCt;
  r243: GluR2_memb + PKCp => GluR2_memb_PKCp; compartment*(kon_243*GluR2_memb*PKCp - koff_243*GluR2_memb_PKCp);
  r244: GluR2_memb_PKCp => GluR2_memb_S880 + PKCp; compartment*kon_244*GluR2_memb_PKCp;
  r245: GluR2_memb_S880 + PP2A => GluR2_memb_S880_PP2A; compartment*(kon_245*GluR2_memb_S880*PP2A - koff_245*GluR2_memb_S880_PP2A);
  r246: GluR2_memb_S880_PP2A => GluR2_memb + PP2A; compartment*kon_246*GluR2_memb_S880_PP2A;
  r247: GluR2 => GluR2_memb; compartment*(kon_247*GluR2 - koff_247*GluR2_memb);
  r248: GluR2_PKCt => GluR2_memb_PKCt; compartment*(kon_248*GluR2_PKCt - koff_248*GluR2_memb_PKCt);
  r249: GluR2_PKCp => GluR2_memb_PKCp; compartment*(kon_249*GluR2_PKCp - koff_249*GluR2_memb_PKCp);
  r250: GluR2_S880 => GluR2_memb_S880; compartment*(kon_250*GluR2_S880 - koff_250*GluR2_memb_S880);
  r251: GluR2_S880_PP2A => GluR2_memb_S880_PP2A; compartment*(kon_251*GluR2_S880_PP2A - koff_251*GluR2_memb_S880_PP2A);
  r252: ACh + M1R => AChM1R; compartment*(kon_252*ACh*M1R - koff_252*AChM1R);
  r253: Gqabg + AChM1R => AChM1RGq; compartment*(kon_253*Gqabg*AChM1R - koff_253*AChM1RGq);
  r254: Gqabg + M1R => M1RGq; compartment*(kon_254*Gqabg*M1R - koff_254*M1RGq);
  r255: ACh + M1RGq => AChM1RGq; compartment*(kon_255*ACh*M1RGq - koff_255*AChM1RGq);
  r256: AChM1RGq => GqaGTP + AChM1R; compartment*(kon_256*AChM1RGq - koff_256*GqaGTP*AChM1R);
  r257: ACh => ; compartment*kon_257*ACh;
  r258: Ca + PLA2 => CaPLA2; compartment*(kon_258*Ca*PLA2 - koff_258*CaPLA2);
  r259: CaPLA2 + Pip2 => CaPLA2Pip2; compartment*(kon_259*CaPLA2*Pip2 - koff_259*CaPLA2Pip2);
  r260: CaPLA2Pip2 => CaPLA2 + AA; compartment*(kon_260*CaPLA2Pip2 - koff_260*CaPLA2*AA);
  r261: AA => Pip2; compartment*(kon_261*AA - koff_261*Pip2);
  r262: PKCt + AA => PKCp; compartment*(kon_262*PKCt*AA - koff_262*PKCp);

  // Unit definitions:
  unit per_second = 1 / second;
  unit ms = 1e-3 second;
  unit nM = 1e-9 mole;
  unit per_ms = 1 / (1e-3 second);
  unit per_nM_per_ms = 1 / (1e-9 mole * 1e-3 second);
  unit per_nM2_per_ms = 1 / ((1e-9 mole)^2 * 1e-3 second);
  unit per_nM3_per_ms = 1 / ((1e-9 mole)^3 * 1e-3 second);
  unit per_nM4_per_ms = 1 / ((1e-9 mole)^3 * 1e-3 second);
end
